# 2.7, 2.8 Lineare Gleichungssysteme f(x) = k*x + d
# A_298
# a)
# 1) 2)
[x, y] := [65*x + 57*y == 1179; 82*x + 74*y == 1502] solve, x, y → [12, 7]
# A_246
# d)
f(x) := a*x^2 + b*x + c
[a, b, c] := [f(0) == 160; f(20) == 0; f'(0) == tan(-80°)] solve, a, b, c → [(tan(80*°) - 8)/20, -tan(80*°), 160] = [-0.116436, -5.67128, 160]
f(x) := a*x^2 + b*x + c → -0.116435909019*x^2 - 5.67128181962*x + 160.0
# A_351
# a)
# 1) 2)
clear(x, y)
[11.03*x + 7.84*y == 308.57; x + y == 30] solve, x, y → [23.0, 7.0]
# b)
clear(a, b, c)
f(x) := a*x^2 + b*x + c
P := [0, 1]
T := [3.7, 0.3]
[f(0) == 1; f(3.7) == 0.3; f'(3.7) == 0] solve, a, b, c → [0.0511322132944, -0.378378378378, 1.0]
# A_302
# c)
# 1) 2)
clear(a, b, c)
f(x) := a*x^2 + b*x + c
[a, b, c] := [f(0) == 173; f(75) == 182; f'(75) == 0] solve, a, b, c → [-1/625, 6/25, 173]
f(x) := a*x^2 + b*x + c → -x^2/625 + 6*x/25 + 173
# 2.9 Quadratisches Gleichungssystem f(x) = ax^2 + bx + c
# A_247
# c)
P(v) := 0.0175*v^2 - 0.0796*v + 0.0391
P(v) == 0.5 solve, v, assume, v > 5, v < 10 → 7.88761969396
# A: Es ist die relative Änderung zwischen 7 und 8.
# A_112
# a)
s(t) := 5*t^2
h(t) := 55 - s(t)
t_P := s(t) == 55 solve, t, assume, t > 0 → sqrt(11)
s'(t_P) = 33.1662
# A_177
# c)
# 1)
h(t) := 226 - 9.81/2*t^2 - 5*t
h(t) == 113 solve, t, assume, t > 0 → 4.31706381098
# 2)
h'(t) → -9.81*t - 5.0
# 2.10 Exponentialgleichungen
# A_331
# b)
# 1)
N(t) := N_0*0.995^t
t := 1*0.995^t == 0.95 solve, t → 10.2329908045
# 2)
0.995^T - 1
0.995^5 - 1 → -0.0247512468781
# B_172
# b)
clear(t)
a := 2.4
t := K == N_0*a^t solve, t → 1.14224524227*ln(K/N_0)
t → 1.14224524227*ln(K/N_0)
# A_263
# a)
G(n) := e^((n - 3)^2/0.2746)
G'(n) == 0 solve, n → 3.0
# A_085
# b)
# 1)
clear(t)
W == 45*e^(-0.223*t) solve, t → -4.48430493274*ln(0.0222222222222*W)
W(t) := 45*e^(-0.223*t)
# 2)
45/100*20 = 9
W(t) == 9 solve, t → 7.21721036966
# A_356
# a)
# 1)
f(t) := 2*1.085^t
# 2)
f(t) == f(0)*4 solve, t → 16.9930691611
# 2.11 Polynomgleichungen, Exponentialgleichungen und trigonometrische Gleichungen
# B_530
# a)
# 1)
clear(c, a)
f(x) := c*a^x
[a, c] := [f(70) == 30000; f(80) == 3000] solve, a, c, assume, a > 0, a == real, c == real → [10^(9/10)/10, 300000000000]
f(x) := c*a^x → 300000000000*(10^(9/10)/10)^x
# 2)
f(90) == 300 → 1
# 3)
T := f(t) == 10*60 solve, t, float, assume, t > 0 → 86.9897000434 = 86.9897
# B_418
# a)
# 1)
S(t) := 50*0.6^t + 12
S(2) == 30 → 1
# 2)
clear(k, t)
S(t) := 50*e^(k*t) + 12
[S(2) == 30] solve, k → ln(9/25)/2 = -0.510826
# 3)
# Die relative Änderungsrate zwischen Punkt 3 und 5 ist -0.30 (-30%)
# B_079
# b)
# 1)
A(t) := 100 - 85*e^(-λ*t)
# Es ist ein beschränktes Wachstum mit der Schranke 100, wodurch sich die Funktion mit steigendem t zu 100 annähern wird
# 2)
λ := [A(2) == 80] solve, λ → -ln(4/17)/2 = 0.723459
A(t) := 100 - 85*e^(-λ*t) → -85.0*e^(-0.723459491468*t) + 100.0
# 3)
A(t) == 90 solve, t → 2.9581008871
# A_362
# a)
N(t) := N_0*e^(-λ*t)
# 1)
# Nach 53 Tagen ist die Halbwertszeit von Beryllium-7.
# 2)
clear(λ)
e^(-λ*53) == 0.5 solve, λ → 0.0130782486898
# A_255
# b)
I(t) := 30000/(1 + b*e^(-0.1739*t))
b := I(41) == 1200 solve, b →  # error: Bad solve variable.
I(t) := 30000/(1 + b*e^(-0.1739*t))
I(t) > 17000 solve, t →  # error: This variable is undefined. Check that the label is set correctly.
# A_199
# d)
N(t) := N_0*0.39685^t
t := 0.5
N_0 := N(0.5) == 500 solve, N_0 → 793.700788976
n := N_0/80 = 9.92126
# 2.12 + B_T_2.1 Trigonometrie mit Sinus, Cosinus und Tangens
# A_309
# c)
# 1)
# Da der Kreis bei x mehrere Werte hätte und das illegal ist!
# 2)
# Der Winkel β ist der Winkel innerhalb des Kreises mit Punkten
# 3)
A := 2*A_2 → 2*A_2
tan(α) == r/s
clear(s)
A_2 := r*s/2 → r*s/2
s := r/tan(α) → r/tan(α)
A_2 := r*r/(2*tan(α)) → r^2/(2*tan(α))
A := 2*A_2 → r^2/tan(α)
# A_164
# c)
α := 86/2 = 43
h := d/(2*tan(α)) → d/(2*tan(43))
# A_360
# c)
# 1)
α := 24.5°
tan(α) = 0.455726
# 2)
clear(α)
l := 53
h := 17.7
sin(α) == h/l solve, α, assume, α < 1 → 0.340504070057 = 19.5094°
# B_T_2.2 Exponential- und Logarithmusrechnungen
# B_509
# b)
clear(t)
h_'(t) := 1.5*t*e^(-0.3*t)
h(t) := integral(h_'(t), t) → (-5.0*t - 16.6666666667)*e^(-0.3*t)
t_1 := h'(t_1) == 1 solve, t_1, assume, t_1 > 8 →  # error: No solution was found.
# [plot: h'(t) vs t]
h'(8.475) = 1.00009
# B_116
# d)
L(A) := 10*log(1 + A/10)
clear(A)
L(A) == 10 solve, A → e^(ln(100000000000000000000)/10) - 10 = 90
# B_260
# b)
# 1)
f_Z := 1 - f_F → -f_F + 1
R_F := 43
R_Z := 65
R_Ges := -10*log(f_F*10^(-R_F/10) + f_Z*10^(-R_Z/10)) float → -4.34294481903*ln(0.316227766017*10^-6*(-1.0*f_F + 1.0) + 5.01187233627e-5*f_F)
F_R := R_Ges == 55 solve, f_F, float → 0.0571467325091
A := 50
A_F := A*F_R = 2.85734
# Buch S.7
# 11)
x^2 + 4*x + p == 0
a := 1
b := 4
c := p → p
# 1)
D := b^2 - 4*a*c → -(4*p) + 16
# 2)
p := D == 0 solve, p → 4
# 3)
clear(p)
D < 0 solve, p → p > 4
# Da:
sqrt(-1) = 1i
# B_T2_2.4 Vektoren in R2 und R3
# B_634
# a)
# 1)
# Vektor c geht zurück zum Ursprung beim Startpunkt des Vektors a
# 2)
# Der Winkel ist der welcher von a und b eingeschlossen wird, wo a und b in die gleiche Richtung zeigen
# 3)
E := [30; 5]
R := [-3; 4]
R_0 := R/|R| = [-0.6; 0.8]
F := E + 12*R_0 = [22.8; 14.6]
# 4)
acos(0.25) = 75.5225 deg
# B_613
# b)
# 1)
v_1 := v_2 - v_3 → -v_3 + v_2
# 2)
v_1 := [-5; -6]
v_2 := [10; 0]
α := acos(v_1*v_2/(|v_1|*|v_2|)) = 129.806 deg
# B_551
# a)
# 1)
# Punkt Nr. 4
# 2)
|c| == sqrt(2)*|a|
c^2 == a^2 + a^2
c == sqrt(a^2 + a^2)
c == sqrt(2*a^2)
c == sqrt(2)*a
# 3)
# Da beide Vektoren im rechten Winkel liegen, haben sie einen Wert von 0
# 4)
c := [-2; -2]
e := [-2; 2]
# B_562
# c)
# 1)
clear(α)
γ := 180 - α → -α + 180
v_Res := sqrt(v_E^2 + v_Wind^2 - 2*v_E*v_Wind*cos(γ)) → sqrt(-(2*v_E*v_Wind*cos(α - 180)) + v_Wind^2 + v_E^2)
v_Res → sqrt(-(2*v_E*v_Wind*cos(α - 180)) + v_Wind^2 + v_E^2)
# 2)
# Es ist der kleine eingeschlossene Winkel an der Diagonalen
# B_487
# c)
# 1)
# Es ist 90°
# 2)
# Punkt Nr. 3, da die Vertauschung der Werte die Richtung gespiegelt hat
# B_T2_2.5 Lineare Gleichungssystem in Matrizenschreibweise
# B_497
# a)
# 1)
d := 5
k := -2/4
f(x) := k*x + d → -x/2 + 5
clear(a, b, c, d)
g(x) := a*x^3 + b*x^2 + c*x + d → a*x^3 + b*x^2 + c*x + d
g'(x) → 3*a*x^2 + 2*b*x + c
[a, b, c, d] := [g(4) == 3; g(16) == 2; g'(4) == f'(4); g'(16) == tan(42°)] solve, a, b, c, d → [(3*tan(42*°) - 1)/432, (-(24*tan(42*°)) + 13)/144, (9*tan(42*°) - 10)/9, (-(48*tan(42*°)) + 166)/27]
g(x) := a*x^3 + b*x^2 + c*x + d → x*(9*tan(42*°) - 10)/9 + x^3*(3*tan(42*°) - 1)/432 + (x^2*(13 - 24*tan(42*°))/144 - (48*tan(42*°) - 166)/27)
# 2)
clear(a, b, c, d)
[4^3, 4^2, 4, 1; 16^3, 16^2, 16, 1; 3*4^2, 2*4, 1, 0; 3*16^2, 2*16, 1, 0]*[a; b; c; d] == [3; 2; f'(4); tan(42°)] → [d + 4*c + 16*b + 64*a; d + 16*c + 256*b + 4096*a; c + 8*b + 48*a; c + 32*b + 768*a] == [3; 2; f'(4); tan(42*°)]
# B_215
# c)
[120, 84, 36; 12, 60, 72; 600, 420, 144]*[a; b; c] == [9864; 7344; 47196] solve, a, b, c, float → [33.0, 45.0, 59.0]
# B_381
# b)
# 1) 2)
K(x) := a*x^3 + b*x^2 + c*x + d → a*x^3 + b*x^2 + c*x + d
clear(a, b, c, d)
[0, 0, 0, 1; 20^3, 20^2, 20, 1; 30^3, 30^2, 30, 1; 50^3, 50^2, 50, 1]*[a; b; c; d] == [500; 604; 672; 920] solve, a, b, c, d → [1/375, -2/25, 86/15, 500]
