# 3.3 Graphen von Potenzfunktionen f(x) = c * x^n
# B_428
# c)
# 1)
y(x) := a*x^2 → a*x^2
a := [y(12) == 15] solve, a → 5/48
F_1 := [0, 1/(4*a)] → [0, 12/5] = [0, 2.4]
# 2)
clear(a)
y(x) := a*x^2 → a*x^2
a := [y(24) == 15] solve, a → 5/192
F_2 := [0, 1/(4*a)] → [0, 48/5] = [0, 9.6]
[R] := F_2[:, 1]/F_1[:, 1] → [4.0]
R = 4
# B_310
# a)
V(BHD) := BHD^2/1000
V(10) = 0.1
V(100) = 10
V(20) = 0.4
V(30) = 0.9
# A: Die Skalierung geht von 1 bis 11.
# 3.4 Null-, Extrem- und Wendestellen & Monotonieverhalten bei Polynomfunktionen zweiten Grades
# B_445
# a)
clear(a, b, c)
h(x) := a*x^2 + b*x + c → a*x^2 + b*x + c
h(x) := a*x^2 + c → a*x^2 + c
[a, c] := [h(0) == 0.28; h(-2.1) == 1.3; h(2.1) == 1.3] solve, a, c → [0.231292517007, 0.28]
h(x) := a*x^2 + c → 0.231292517007*x^2 + 0.28
a → 0.231292517007
# B_377
# d)
h(x) := x^3 - 6*x^2 + 7*x + 8
A := [0, 8]
P := [5, 20]
d := sqrt(5^2 + (20 - 8)^2) = 13
h(5) == 20 → 0
h(x) == 20 solve, x, assume, x == real, float → 5.08772982228
# A: Es liegt nicht auf der Flugbahn.
# B_031
# c)
# A: Da es eine Polynomfunktion dritten Grades ist, benötigt es drei bekannte Werte.
clear(a, b, c, x)
f(x) := a*x^2 + b*x + c → a*x^2 + b*x + c
[a, b, c] := [f(3) == 5; f(12) == 7; f'(3) == tan(46°)] solve, a, b, c → [(-(9*tan(46*°)) + 2)/81, (45*tan(46*°) - 4)/27, (-(36*tan(46*°)) + 47)/9] = [-0.0903676, 1.57774, 1.0801]
f(x) := a*x^2 + b*x + c → -0.0903675657298*x^2 + 1.57773570817*x + 1.08010096706
a = -0.0903676
b = 1.57774
c = 1.0801
# B_T_3.1 Funktion & Umkehrfunktion
# B_441
# b)
# 1)
# Es liegt gespielt an der ersten Mediane und geht von negativ nach oben und dann nach rechts.
# 2)
# Die Spiegelung findet anhand y=x statt.
# B_178
# a)
clear(v, d)
v == 63.7/d^2
v*d^2 == 63.7
d^2 == 63.7/v
d == sqrt(63.7/v)
# B_028
# a)
L(w) := w/30
w(L) := 30*L
# Die Umkehrfunktion beschreibt die Menge an Wasser, die pro Löffel benötigt wird.
# B_T_3.2 Arbeit mit linearen, quadratischen, Wurzel-, Potenz-, Exponential- und Logarithmusfunktionen, Verschiebung & Skalierung verschiedener Funktionen
# B_105
# a)
N(A) == 1
N(2) == 0.5
N(4) == 0.25
N(B) == 0.65
N(6) == 0.325
N_0 := 0.325
N(s) := N_0*e^(-0.3466*s)
N(3) = 0.114896
N(C) := N(3) + 0.5 = 0.614896
# B_026
# a)
clear(a)
f(x) := a*(x - x_s)^2 + y_s → a*(x - x_s)^2 + y_s
x_s := 1
y_s := 1
f(x) := a*(x - x_s)^2 + y_s → a*(x - 1)^2 + 1
a := f(0) == 0 solve, a → -1
f(x) := a*(x - x_s)^2 + y_s → -(x - 1)^2 + 1
clear(x, y)
[y_1; y_2] := (y - 0.5)^2 + (x - 1)^2 == 0.25 solve, y, simplify → [(-1.0*(x - 1.5)*(x - 0.5))^0.5 + 0.5; -1.0*(-1.0*(x - 1.5)*(x - 0.5))^0.5 + 0.5]
y_1(x) := (-1.0*(x - 1.5)*(x - 0.5))^0.5 + 0.5
y_2(x) := -1.0*(-1.0*(x - 1.5)*(x - 0.5))^0.5 + 0.5
y_1(1.4) = 0.8
y_2(1.4) = 0.2
# B_614
# a)
# 1)
clear(t)
T(t) := a + 100/3*t*e^(1 - c*t)
# Im Graphen eingezeichnet.
# 2)
# Da a nur die Funktion nach oben verschiebt und das Maximum, was mithilfe der ersten Ableitung berechnet wird, was kein a beinhaltet
# 3)
a := 30
clear(c)
# 4)
c := 80 == a + 100/(3*c) solve, c → 2/3
T(t) := a + 100/3*t*e^(1 - c*t) → 100*t*e^(-2*t/3 + 1)/3 + 30
# B_553
# b)
# 1)
f_2(x) := 5/4*sqrt(-x^2 + 20.8*x - 50.4)
EX := f_2'(x) == 0 solve, x → 10.4
h := f_2(EX) = 9.5
D := 2*h = 19
# 2)
k := f_2'(6.2) = 0.828856
f(x) := k*x + d → 0.82885553356*x + d
d := f(6.2) == f_2(6.2) solve, d → 2.77863950298
f(x) := k*x + d → 0.82885553356*x + 2.77863950298
# 3)
NS := f_2(x) == 0 solve, x, assume, x > 6.2 → 18.0
V := π*integral(f(x)^2, x = 0 .. 6.2) + π*integral(f_2(x)^2, x = 6.2 .. NS) = 3106.11
# B_372
# b)
# 1)
f(t) := a - a*e^(-b*t)
# Der vorletzte Graph ist korrekt.
# 2)
# Linearer Mittelwert des Wirkstoffes im Blut zwischen Verabreichung und den ersten 30 Minuten danach.
# B_522
# a)
clear(a)
f(x) := a*sqrt(x) → a*sqrt(x)
# 1)
h(x) := f(x + 1) - 0.5 → a*(x + 1.0)^0.5 - 0.5
h(x) → a*(x + 1.0)^0.5 - 0.5
# 2)
clear(b)
g(x) := b*sqrt(x) → b*sqrt(x)
b := g(0.4) == -1.62 solve, b → -2.56144490474
g(x) := b*sqrt(x) → -2.56144490474*x^0.5
b = -2.56144
# 3)
# Das vierte stimmt.
# B_487
# b)
# 1)
3*10^7 = 30000000
# 2)
A(λ) := 1 - e^(-0.0106/λ^4)
# A: Da mit größer werdenden λ die Potenz von e immer kleiner wird, nähert es sich e^0 also 1 an, was am Ende 1-1 zu 0 bringt.
# B_T2_3.3 Vorheriges mit Polynomfunktionen und sin & cos Verschiebung / Abänderung
# B_295
# a)
# A: Es hat zwei y Werte für ein x.
clear(a, b, c, d, e, x)
f(x) := a*x^4 + b*x^3 + c*x^2 + d*x + e_1  # error: This variable is undefined. Check that the label is set correctly.
[a, b, c, d, e] := [f(-3) == 0; f(-1) == 3; f(4) == 3; f(6) == 0; f'(-1) == 0; f'(4) == 0] solve, a, b, c, d, e_1 → [-3/196, 9/98, -3/196, -18/49, 135/49]
f(x) := a*x^4 + b*x^3 + c*x^2 + d*x + e
f(x) → -3*x^4/196 + 9*x^3/98 + (135/49 - 18*x/49 - 3*x^2/196)
# B_448
# b)
clear(a, t)
f(t) := a*sin(π/12*t) + 135  # error: This variable is undefined. Check that the label is set correctly.
# 1)
f'(t) == 0 solve, t → 6
ω := π/12
T := 2*π/ω = 24
T/4 = 6
# 2)
a := f(6) == 127.5 solve, a → -7.5
# 3)
f(t) := a*sin(π/12*t) + 135 → -7.5*sin(0.261799387799*t) + 135.0
f_1(x) := f(x) + 10 → -7.5*sin(0.261799387799*x) + 145.0
