# 5.1 Daten statistisch analysieren, darstellen und anhand diesen argumentieren
# A_322
# b)
# 1)
# 1. Falsch
# 2. Falsch
# 3. Wahr
# 4. Falsch
# 5. Falsch
# 2)
240/190 - 1 = 0.263158  # 26.3%
# 5.2 Boxplots & Lage- und Streuungsmaße empirischer Daten
# A_348
# a)
# 1)
25621 - 15726 = 9895
# A_344
# a)
# 1)
x := (H_1 + 2*H_2)/(H_0 + H_1 + H_2) → (2*H_2 + H_1)/(H_2 + H_1 + H_0)
# 2)
# -> 4. Aufgabe
# 3)
# -> 1: 0
# -> 2: 7
# 5.3 Wahrscheinlichkeitsrechnung & Zusammenhang Wahrscheinlichkeit und Häufigkeiten
# B_499
# a)
# 1)
(5 + 4 + 3 + 2 + 1)/36 = 0.416667  # 41.7%
# 2)
1 + 6 → 7
2 + 5 → 7
3 + 4 → 7
4 + 3 → 7
5 + 2 → 7
6 + 1 → 7
6/36 → 1/6
# B_115
# a)
[
    2, 3, 4, 5, 6, 7, 8, 9, 10, 11, 12;
    1/36, 2/36, 3/36, 4/36, 5/36, 6/36, 5/36, 4/36, 3/36, 2/36, 1/36
]
P_1 := 4/36 + 5/36 + 6/36 + 5/36 = 0.555556
P_2 := 1 - P_1 → 0.444444444444
# B_329
# c)
3/57 = 0.0526316
(1 - 30/57)^n → (9/19)^n
# A: Der Ausdruck entspricht der Wahrscheinlichkeit, dass man n Anfahrten keine rote Ampel empfängt.
# 5.4 Wahrscheinlichkeitsrechnung anhand Baumdiagramme
# A_325
# b)
# 1)
# 7/12  5/12
# 6/11 5/11  7/11 4/11
# 2)
1 - 5/12*4/11 → 28/33 = 0.848485  # 84.8%
# A_183
# d)
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# P ist die Wahrscheinlichkeit, dass min. ein Schuss gehalten wird
# A_353
# b)
# 1)
P := 0.55
n := 7
# -> B
# -> C
# 2)
P := 0.18
n := 10
# c)
# 0.55  0.45
# 0.125 0.875  x 1-x
x := 0.55*0.125 + 0.45*x == 0.08 solve, x →  # error: Bad solve variable.
x =  # error: This variable is undefined. Check that the label is set correctly.
# A_312
# d)
# 1)
# 0.5  0.5
# 0.65 0.35  0.55 0.45
# 2)
# A: Chance, dass eine Person eine Besserung verspürt
# 5.5 Binomialverteilung modellieren und berechnen
# A_344
# c)
P := 0.007
n := 300
# 1)
P_i := 1 - P = 0.993
pbinom(2, n, P) = 0.649537  # -> max. x aus n mit P=Wahrscheinlichkeit
# 2)
# Min. 1 Gepäckstück ist beim Transport beschädigt
# A_282
# b)
P := 6/8 = 0.75
n := 8
dbinom(3, 5, P) = 0.263672  # -> genau x mal aus n mit P=Wahrscheinlichkeit
# c)
# 1: mindestens 1 Kugel grün
# 2: 1 - (5/12)^3
# A_297
# d)
# 1)
# Min. einmal kann sie gehen
# A_302
# d)
# 1)
# 1: D
# 2: A
# 5.6 Normalverteilung und Wahrscheinlichkeitsdichte
# A_297
# c)
# 1)
μ := 14
σ := 1.5
# 2)
# Ab Punkt 16 bis ∞
# A_347
# c)
# 1)
X ≥ 137
# A_356
# b)
# 1)
μ := 0.5
σ := 0.1
# A_238
# d)
μ := 16
σ := 0.3
p := 1 - pnorm(16.2, μ, σ) = 0.252493  # 25.2%
# A_190
# a)
μ := 180
σ := 20
Q_2 := 140
# Bis Abschnitt 200
# A_098
# b)
μ := 3.6
σ := 0.7
a := qnorm(1 - 0.1, μ, σ) = 4.49709
# Kontrolle:
1 - pnorm(a, μ, σ) = 0.1
# B_T_5.1 Normalverteilung mit μ und σ
# B_602
# c)
# 1)
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# 2) Stichprobenmittelwert
μ := 5.8
σ := 1.2
n := 9
σ_s := σ/sqrt(n) = 0.4
pnorm(6, μ, σ_s) - pnorm(5, μ, σ_s) = 0.668712  # 66.9%
# B_577
# a)
# 1)
μ_A == μ_B
σ_A < σ_B
# 2)
UG := 430
OG := 590
P := 0.7
μ := (UG + OG)/2 = 510
z := qnorm((1 - P)/2, 0, 1) = -1.03643
clear(σ)
z == (UG - μ)/σ solve, σ → 77.1877872818
# B_315
# c)
UG := 780
OG := 1140
μ := (UG + OG)/2 = 960
P := 0.95
z := qnorm((1 - P)/2, 0, 1) = -1.95996
z == (UG - μ)/σ solve, σ → 91.8384222464
# B_T_5.2 Stichprobenmittelwerte
# B_566
# a)
# 1)
μ := 350
σ_s := 2
n := 9
P := pnorm(350, μ, σ_s) - pnorm(349, μ, σ_s) = 0.191462  # 19.1%
# 2)
σ := σ_s*sqrt(n) = 6
# B_611
# b)
# 1)
# 1 -> C
# 2 -> B
# 2)
σ := 5
μ := 250
σ_s := 1
clear(n)
n := σ/sqrt(n) == σ_s solve, n → 25
# B_345
# d)
μ := 300
σ := 5
n := 20
P := 0.95
z := qnorm((1 - P)/2, 0, 1) = -1.95996
clear(UG)
σ_s := σ/sqrt(n) = 1.11803
# Luna Version:
UG := z == (UG - μ)/σ_s solve, UG → 297.808693649
d := μ - UG = 2.19131
OG := μ + d = 302.191
# Emma Version:
UG := qnorm((1 - P)/2, μ, σ_s) = 297.809
OG := qnorm(1 - (1 - P)/2, μ, σ_s) = 302.191
# B_070
# d)
μ := 44
σ := 12
n := 25
P := 0.95
σ_s := σ/sqrt(n) = 2.4
UG := qnorm((1 - P)/2, μ, σ_s) = 39.2961
OG := qnorm(1 - (1 - P)/2, μ, σ_s) = 48.7039
d := μ - UG = 4.70391
d_n := d/2 = 2.35196
clear(n)
n := σ_s/2 == σ/sqrt(n) solve, n → 100.0
# Um die Breite des Streubereichs zu halbieren, muss der Stichprobenumfang
# vervierfacht werden, weil:
σ_s/2 == σ/(2*sqrt(n))
σ_s/2 == σ/sqrt(4*n)
# B_531
# c)
# 1)
μ := 1000
σ := 6
UG := 998
OG := 1002
clear(n)
2 == σ/sqrt(n) solve, n → 9
# 2)
n := 8
P := 0.95
α := 1 - P = 0.05
f := n - 1 = 7
data := [500.8, 499.4, 500.2, 501.6, 502.5, 500.5, 499.8, 501.4]
x := mean(data) = 500.775
s := Stdev(data) = 1.02085
t := qt(1 - α/2, f) = 2.36462
a := t*s/sqrt(n) = 0.853455
μ_U := x - a = 499.922
μ_O := x + a = 501.628
# B_T_5.3 Konfidenzintervalle mit μ und σ in der Normalverteilung
# B_592
# b)
# 1)
data := [0.97, 0.971, 0.968, 0.97, 0.965, 0.973, 0.971, 0.966]
x := mean(data) = 0.96925
s := Stdev(data) = 0.00271241
# 2)
n := length(transpose(data)) = 8
α := 1 - 0.95 = 0.05
f := n - 1 = 7
t := qt(1 - α/2, f) = 2.36462
a := t*s/sqrt(n) = 0.00226763
μ_U := x - a = 0.966982
μ_O := x + a = 0.971518
# B_566
# b)
# 1)
n := 9
x := 299
s := 6.3
P := 0.9
f := n - 1
α := 1 - P = 0.1
t := qt(1 - α/2, f) = 1.85955
s := t*s/sqrt(n) = 3.90505
μ_U := x - s = 295.095
μ_O := x + s = 302.905
# B_370
# d)
x := 1005
n := 8
f := n - 1 = 7
s := 48
α := 0.01
t := qt(1 - α/2, f) = 3.49948
s := t*s/sqrt(n) = 59.3882
μ_U := x - s = 945.612
μ_O := x + s = 1064.39
# B_346
# b)
σ := 75
n := 8
α := 1 - 0.95 = 0.05
data := [1053, 900, 984, 873, 838, 1045, 960, 955]
x := mean(transpose(data)) = 951
z := qnorm(1 - α/2, 0, 1) = 1.95996
a := z*σ/sqrt(n) = 51.9714
μ_U := x - a = 899.029
μ_O := x + a = 1002.97
# Da eine Vervierfachung von n eine Halbierung auf der Seite des Vertrauensbereiches bedeutet:
a == z*σ/sqrt(4*n) == z*σ/(2*sqrt(n)) == 1/2*z*σ/sqrt(n)
# B_048
# a)
data := [152, 166, 149, 153, 172, 147, 157, 164, 157, 168]
x := mean(data)
n := length(transpose(data)) = 10
σ := 8.5
f := n - 1 = 9
α := 1 - 0.95 = 0.05
z := qnorm(1 - α/2, 0, 1) = 1.95996
s := z*σ/sqrt(n) = 5.26826
μ_U := x - s = 153.232
μ_O := x + s = 163.768
# B_187
# a)
# Die relative Änderung/Unteschied zwischen dem größten und kleinsten Wert bzw. die relative Spannweite
X := transpose([0, 3, 6, 9])
Y := transpose([722.4, 746.8, 803.7, 875])
[d; k] := line(X, Y) = [709.77; 17.1567]
f(x) := k*x + d → 17.1566666667*x + 709.77
f(2018 - 2002) = 984.277
r := corr(X, Y) = 0.979286
# B_475
# a)
# 1)
X := transpose([2, 8, 16, 30, 39, 46])
Y := transpose([547, 456, 400, 139, 108, 25])
corr(X, Y) = -0.988124
# Da ein größeres x ein kleineres y bedeutet, ist es eine negative Korrelation
# 2)
[d; k] := line(X, Y) = [562.966; -12.0766]
f(x) := k*x + d → -12.0765751212*x + 562.966182014
# 3)
# Desto weiter entfernt man ist, deto weniger wird die Datenübertragungsgeschwindigkeit
# B_501
# b)
X := transpose([18, 20, 24, 26, 28])
Y := transpose([23800, 32200, 54600, 68000, 81900])
[d; k] := line(X, Y) = [-82918.6; 5819.77]
f(x) := k*x + d → 5819.76744186*x - 82918.6046512
# B_T2_5.5 Ausgleichsfunktionen modellieren (Methode der kleinsten Quadrate)
# B_447
# a)
# 1)
# Es ist die mittlere Änderungsrate zwischen dem ersten und zweiten Tag
# 2)
X := transpose([1, 2, 3, 4, 5, 6, 7])
Y := transpose([0.7, 1.4, 2.3, 3.6, 5.2, 7.3, 9.7])
[s, s; sc, c; sb, b; sa, a] := polyfitc(X, Y, 2) = ["Coefficient", "Coefficient"; "Intercept", 0.514286; "A", 0.0511905; "AA", 0.179762]
f(x) := a*x^2 + b*x + c → 0.179761904762*x^2 + 0.0511904761905*x + 0.514285714286
# 3)
z(t) := 0.25*t^2 - 4.1*t + 17
clear(t)
t := f(t) == 11 solve, t, assume, t > 0 → 7.49642464027
z(t) = 0.313755  # 0.314%
# B_050
# c)
X := transpose([293, 313, 333, 353, 373])
Y := transpose([510, 290, 178, 120, 80])
[s, s; sd, d; sc, c; sb, b; sa, a] := polyfitc(X, Y, 3) = [
    "Coefficient", "Coefficient";
    "Intercept", 44282.9;
    "A", -364.987;
    "AA", 1.01049;
    "AAA", -0.0009375
]
f(x) := a*x^3 + b*x^2 + c*x + d → -0.0009375*x^3 + 1.01049107143*x^2 - 364.986741071*x + 44282.8571875
# Da die Steigung niemals positiv wird und auch beim Wendepunkt negativ bleibt, kann die Ableitung niemals positiv werden und somit existiert keine Nullstelle in der Ableitungsfunktion.
clear(x)
# B_524
# a)
# 1)
ω := 2*π/360 = 0.0174533
# 2)
# 1 -> A
# 2 -> D
# 3)
A := 10
c := 13
f(t) := A*sin(ω*t - 2*π/3) + c → 10.0*sin(0.0174532925199*t - 2.09439510239) + 13.0
t := 120
E := f(t) = 13
T := 12
F := E - T = 1
# 4)
s := sum((f(t_i) - y_i)^2, i = 1 .. 1000) → 100000.0*sin(0.0174532925199*t_i - 2.09439510239)^2 + (260000.0 - 20000.0*y_i)*sin(0.0174532925199*t_i - 2.09439510239) + 1000.0*y_i^2 - 26000.0*y_i + 169000.0
# B_049
# b)
X := transpose([15, 20, 25, 30, 35, 40, 45, 50, 55, 60])
Y := transpose([110, 120, 156, 185, 190, 245, 274, 340, 360, 430])
[c; λ; d] := expfit(X, Y) = [103.629; 0.0252907; -44.5212]
f(x) := c*e^(λ*x) + d → 103.629436638*e^(0.0252906685083*x) - 44.5211863513
f(x) == 1000 solve, x → 91.3575074877
