# Aufgaben der Maturathemen
# B_T_1.1 Fehlerrechnung
# B_541
# c)
# 1)
L_1 := 2*sqrt((h/2)^2 + (R - r)^2)  # error: {0} has multiple definitions, you must specify the label to select the definition that you want.
# 2)
L_1/L - 1 == -0.015
# L_1 ist 1.5% kleiner als L. Der Fehler ist daher -1.5%.
# B_430
# a)
R(T) := 100*(1 + 0.00385*T - 5.775*10^-7*T^2)
R_1 := R(450) = 261.556
R := 260
R_1/R - 1 = 0.00598317  # -> 0.6% ist der Fehler
|R_1 - 260|/260 = 0.00598317
# B_050
a := 0.1
b := 2500
T_0 := 373.15
# b)
R(T) := a*e^(b/T) → 0.1*e^(2500.0/T)
R(T_0) = 81.2177
k := R'(T_0) = -1.45822
f(x) := k*x + d
d := [f(T_0) == R(T_0)] solve, d → 625.353633358
f(x) := k*x + d → -1.45822298744*x + 625.353633358
T := 390
R_T1 := f(390) = 56.6467
R_T := R(390) = 60.805
|R_T1 - R_T|/R_T = 0.0683873  # -> 6.8% Fehler
# -> B_567 für Aufgabe mit Stochastik
# B_T2_1.2 Komplexe Zahlen
# B_510
# a)
# 1)
i := sqrt(-1) = 1i
2*e^(-i*π/2) = -2i
# 2)
z_2 := 4i - 3
z_3 := -4i - 3
# b)
clear(a, b)
i*i → -1
(a + b*i)*(a - b*i) simplify → b^2 + a^2
# A_298
# a)
# 1) 2)
[x, y] := [65*x + 57*y == 1179; 82*x + 74*y == 1502] solve, x, y → [12, 7]
# A_246
# d)
f(x) := a*x^2 + b*x + c
[a, b, c] := [f(0) == 160; f(20) == 0; f'(0) == tan(-80°)] solve, a, b, c → [(tan(80*°) - 8)/20, -tan(80*°), 160] = [-0.116436, -5.67128, 160]
f(x) := a*x^2 + b*x + c → -0.116435909019*x^2 - 5.67128181962*x + 160.0
# A_351
# a)
# 1) 2)
clear(x, y)
[11.03*x + 7.84*y == 308.57; x + y == 30] solve, x, y → [23.0, 7.0]
# b)
clear(a, b, c)
f(x) := a*x^2 + b*x + c
P := [0, 1]
T := [3.7, 0.3]
[f(0) == 1; f(3.7) == 0.3; f'(3.7) == 0] solve, a, b, c → [0.0511322132944, -0.378378378378, 1.0]
# A_247
# c)
P(v) := 0.0175*v^2 - 0.0796*v + 0.0391
P(v) == 0.5 solve, v, assume, v > 5, v < 10 → 7.88761969396
# A: Es ist die relative Änderung zwischen 7 und 8.
# A_112
# a)
s(t) := 5*t^2
h(t) := 55 - s(t)
t_P := s(t) == 55 solve, t, assume, t > 0 → sqrt(11)
s'(t_P) = 33.1662
# A_331
# b)
# 1)
N(t) := N_0*0.995^t
t := 1*0.995^t == 0.95 solve, t → 10.2329908045
# 2)
0.995^T - 1
0.995^5 - 1 → -0.0247512468781
# B_172
# b)
clear(t)
a := 2.4
t := K == N_0*a^t solve, t → 1.14224524227*ln(K/N_0)
t → 1.14224524227*ln(K/N_0)
# A_263
# a)
G(n) := e^((n - 3)^2/0.2746)
G'(n) == 0 solve, n → 3.0
# A_085
# b)
# 1)
clear(t)
W == 45*e^(-0.223*t) solve, t → -4.48430493274*ln(0.0222222222222*W)
W(t) := 45*e^(-0.223*t)
# 2)
45/100*20 = 9
W(t) == 9 solve, t → 7.21721036966
# B_530
# a)
# 1)
clear(c, a)
f(x) := c*a^x
[a, c] := [f(70) == 30000; f(80) == 3000] solve, a, c, assume, a > 0, a == real, c == real → [10^(9/10)/10, 300000000000]
f(x) := c*a^x → 300000000000*(10^(9/10)/10)^x
# 2)
f(90) == 300 → 1
# 3)
T := f(t) == 10*60 solve, t, float, assume, t > 0 → 86.9897000434 = 86.9897
# B_418
# a)
# 1)
S(t) := 50*0.6^t + 12
S(2) == 30 → 1
# 2)
clear(k, t)
S(t) := 50*e^(k*t) + 12
[S(2) == 30] solve, k → ln(9/25)/2 = -0.510826
# 3)
# Die relative Änderungsrate zwischen Punkt 3 und 5 ist -0.30 (-30%)
# B_079
# b)
# 1)
A(t) := 100 - 85*e^(-λ*t)
# Es ist ein beschränktes Wachstum mit der Schranke 100, wodurch sich die Funktion mit steigendem t zu 100 annähern wird
# 2)
λ := [A(2) == 80] solve, λ → -ln(4/17)/2 = 0.723459
A(t) := 100 - 85*e^(-λ*t) → -85.0*e^(-0.723459491468*t) + 100.0
# 3)
A(t) == 90 solve, t → 2.9581008871
# A_362
# a)
N(t) := N_0*e^(-λ*t)
# 1)
# Nach 53 Tagen ist die Halbwertszeit von Beryllium-7.
# 2)
clear(λ)
e^(-λ*53) == 0.5 solve, λ → 0.0130782486898
# A_255
# b)
I(t) := 30000/(1 + b*e^(-0.1739*t))
b := I(41) == 1200 solve, b → 29970.0500511
I(t) := 30000/(1 + b*e^(-0.1739*t))
I(t) > 17000 solve, t → t > 60.8178137835
