1.
f(x) := (2*x^3 - 3*x^2 - 2*x + 4)/(x^2 - 1)
f(x) simplify → 1/(x^2 - 1) + (2*x - 3)
2.
140/20 = 7
7*m/s
3.
integral((3*x^2 - 2*x + 1)/(x^3 - x), x) + C expand → 3*ln(x + 1) + ln(x - 1) - ln(x) + C
4*a
integral(x^3*ln(x), x) expand → x^4*ln(x)/4 - x^4/16
(b)
integral(6*cos(x) - 3^x + nthroot(x, 3), x) expand → 3*x*nthroot(x, 3)/4 - 3^x/ln(3) + 6*sin(x)
(c)
integral((2*x - 3)*(x^2 - 3*x)^7, x) factor → 1/8*(x - 3)^8*x^8
5.
f(x) := x^3 - x
f(x) == 0 solve, x → [0; 1; -1]
max := |integral(f(x), x = -1 .. 0)| + |integral(f(x), x = 0 .. 1)| = 0.5
