# Nummern im Dokument:
# 1.107) 1.108) 1.110) 1.111) 1.122) 1.123) 5.71) 5.73) 7.10) d) 7.31) 7.34) 7.39) 7.52) 7.53) a) b) 7.75) c) 7.78) 7.79) 7.92) b) 7.95) 7.96) 7.103) 7.104) 7.105) 7.106)
# 1.107)
KS := 1500
t := 25
# a)
KE := KS*2
n := t
i := KE == KS*(1 + i)^n solve, i, assume, i == real → 0.0281138266561
i := i + 1%
clear(n)
n := KE == KS*(1 + i)^n solve, n → 18.530652537
# b)
KE := KS*2
n := t
clear(i)
i := KE == KS*(1 + i)^n solve, i, assume, i == real → 0.0281138266561
i := i - 0.5%
clear(n)
n := KE == KS*(1 + i)^n solve, n → 30.3336753777
# 1.108)
KS := 1
KE := KS*(1 + 6%)^3*(1 + 3.125%)^5*(1 + 4.5%)^2
# 1.110)
# a)
A1 := 250000
i := 4.125%
t := 3
A2 := 283000
F1 := A1*(1 + i)^t → 282231.219238
F2 := A2 → 283000
# A: Das zweite Angebot bringt mehr Geld ein.
# b)
S := 3574.39
i := 2.2%
t := 3
W := S*(1 + i)^t → 3815.52781438
# 1.111)
T1 := 19 - 15 → 4
i := 5.575%
T2 := 19 - 14 → 5
T3 := 19 - 12 → 7
KS1 := KS1*(1 + i)^T1 == 3000 solve, KS1 → 2414.77624187
KS2 := KS2*(1 + i)^T2 == 3000 solve, KS2 → 2287.26141782
KS3 := KS3*(1 + i)^T3 == 3000 solve, KS3 → 2052.0768643
# 1.112)
clear(i, t, t1, t2)
EW := 18000
i := 3.5%
EIN := 540
t := 18
t1 := 10
t2 := t - 10 → 8
SW := EW == SW*(1 + i)^t solve, SW → 9690.50051191
i2 := EW == (SW*(1 + i)^t1 + EIN)*(1 + i2)^t2 solve, i2, assume, i2 > 0 → 0.0299996213061
# 1.122)
R1 := 2500
i1 := 4%
q1 == 1 + i1
n := 1
R2 := 2500
i2 := 4%
q2 := 1 + i2
# 1)
S1 := R1*(q1^n - 1)/(q1 - 1)*q1 → 2500*q1
S2 := R2*(q2^n - 1)/(q2 - 1) → 2500
# A: Die vorschüssige Rate wird immer um eine exakte Rate (Faktor=1.04) multipliziert größer sein, da nachschüssige Raten am Ende des Jahres gezahlt werden
# 2)
n := 20
clear(S1, S2)
S1 := R1*(q1^n - 1)/(q1 - 1)*q1 float → q1*(2500.0*q1^19 + 2500.0*q1^18 + 2500.0*q1^17 + 2500.0*q1^16 + 2500.0*q1^15 + 2500.0*q1^14 + 2500.0*q1^13 + 2500.0*q1^12 + 2500.0*q1^11 + 2500.0*q1^10 + 2500.0*q1^9 + 2500.0*q1^8 + 2500.0*q1^7 + 2500.0*q1^6 + 2500.0*q1^5 + 2500.0*q1^4 + 2500.0*q1^3 + 2500.0*q1^2 + 2500.0*q1 + 2500.0)
clear(R2)
R2 := S1 == R2*(q2^n - 1)/(q2 - 1) solve, R2 → 83.9543758216*q1^20 + 83.9543758216*q1^19 + 83.9543758216*q1^18 + 83.9543758216*q1^17 + 83.9543758216*q1^16 + 83.9543758216*q1^15 + 83.9543758216*q1^14 + 83.9543758216*q1^13 + 83.9543758216*q1^12 + 83.9543758216*q1^11 + 83.9543758216*q1^10 + 83.9543758216*q1^9 + 83.9543758216*q1^8 + 83.9543758216*q1^7 + 83.9543758216*q1^6 + 83.9543758216*q1^5 + 83.9543758216*q1^4 + 83.9543758216*q1^3 + 83.9543758216*q1^2 + 83.9543758216*q1
# 3)
R := 2500
i := 4%
q := 1 + i float → 1.04
n := 10
B := R*(q^n - 1)/(q - 1)*q → 31215.8785197
clear(KS)
KS := B == KS*(1 + i)^n solve, KS → 21088.3290263
# 1.123)
KS := 10000
i := 1.25%
t1 := 65 - 20 → 45
EX := 1200
q := 1 + i
t2 := t1 - 10 → 35
# 1)
KE := KS*(1 + i)^t1 + EX*(q^t2 - 1)/(q - 1)*q → 70428.0679823  # Vorschüssig
# 2)
JR := KE == 2000*(q^JR - 1)/(q - 1)*1/q^JR solve, JR, assume, JR > 0 → 46.7000095896
# 3)
JR2 := KE == 1000*(q^JR2 - 1)/(q - 1)*1/q^JR2 solve, JR2, assume, JR2 > 0 → 170.914723189
# 1.124)
clear(A, B, R, t1, t2, i, n, q, R)
A := 10000
R1 := 7000
t1 := 15  # nachschüssig
B := 42000
R2 := 10000
t2 := 6  # vorschüssig
# 1)
i := 5%
q1 := 1 + i float → 1.05
BA := R1*(q1^t1 - 1)/(q1 - 1)*1/q1^t1 → 72657.6062673
BA := BA + 10000 → 82657.6062673
q2 := 1 + i float → 1.05
BB := R2*(q2^t2 - 1)/(q2 - 1)*1/q2^(t2 - 1) → 53294.7667063
BB := BB/q2^5 → 41757.8442502
BB := BB + 42000 → 83757.8442502
# 5.71)
f(x) := a*x^3 + b*x^2 + c*x + d
W := [11, yw]
P := [4, 6]
f'(x) → 3*a*x^2 + 2*b*x + c
f''(x) → 6*a*x + 2*b
[a, b, c, d] := [f(0) == 0; f(4) == 6; f'(4) == 0; f''(11) == 0] solve, a, b, c, d → [3/200, -99/200, 81/25, 0] = [0.015, -0.495, 3.24, 0]
f(x) := a*x^3 + b*x^2 + c*x + d → 0.015*x^3 - 0.495*x^2 + 3.24*x
# 5.73)
clear(a, b)
f(x) := a*x^4 + b*x^2
# 2)
[a, b] := [f(0) == 0; f'(0) == 0; f(-1) == 5; f''(-1) == 0] solve, a, b → [-1, 6]
f(x) := a*x^4 + b*x^2 → -x^4 + 6*x^2
# 7.10)
# d)
f(x) := x^3 - 2*x^2 - 3*x
a := -1
b := 4
NS := f(x) == 0 solve, x → [0; 3; -1]
NS1 := min(NS[0, :]) → 0
NS2 := min(NS[1, :]) → 3
A := |integral(f(x), x = a .. NS1)| + |integral(f(x), x = NS1 .. NS2)| + |integral(f(x), x = NS2 .. b)| float → 20.4166666667
# 7.26
clear(a, b, c, d)
f(x) := a*x^4 + b*x^3 + c*x^2 + d*x
[a, b, c, d] := [f(0) == 0; f'(0) == 0; f''(0) == 0; f(5) == 0; integral(f(x), x = 0 .. 5) == 31.25] solve, a, b, c, d → [-0.2, 1.0, 0.0, 0.0]
f(x) := a*x^4 + b*x^3 + c*x^2 + d*x
# [plot: f(x) vs x]
clear(a, b, c, d)
f(x) := a*x^4 + b*x^3 + c*x^2 + d*x
[a, b, c, d] := [f(0) == 0; f'(0) == 0; f''(0) == 0; f(5) == 0; integral(f(x), x = 0 .. 5) == -31.25] solve, a, b, c, d → [0.2, -1.0, 0.0, 0.0]
f(x) := a*x^4 + b*x^3 + c*x^2 + d*x
# [plot: f(x) vs x]
# 7.31)
clear(a, b, f)
# 1)
y1(x) := 0.1*x^3 - 0.7*x^2 + 1.3*x + a
ST := 0
h := 4
y2(x) := 0.15*x^3 - 1.55*x^2 + 5*x + b
EN := 6
w := 6
A1 := integral(y1(x), x = 0 .. 5) - integral(y2(x), x = 1 .. 5) → -4.0*b + (5.0*a - 16.625)
A2 := 1*h - integral(y2(x), x = 5 .. 6) → -1.0*b - 1.64583333333
A := A1 + A2
# 2)
[a, b] := [y2(1) == 0; y1(5) == 4] solve, a, b → [2.5, -3.6]
y1(x) := 0.1*x^3 - 0.7*x^2 + 1.3*x + a → 0.1*x^3 - 0.7*x^2 + 1.3*x + 2.5
y2(x) := 0.15*x^3 - 1.55*x^2 + 5*x + b → 0.15*x^3 - 1.55*x^2 + 5.0*x - 3.6
# 3)
BA1 := integral(y1(x), x = 0 .. 5) - integral(y2(x), x = 1 .. 5) → 10.275
BA2 := 1*h - integral(y2(x), x = 5 .. 6) → 1.95416666667
BA := BA1 + BA2 → 12.2291666667
GA := h*w - BA → 11.7708333333
# 7.34)
f(x) := -1/16*x^2 + 2
# 1)
r := 2
d := 2*r → 4
AZ := π*r^2 float → 12.5663706144
NS := f(x) == 0 solve → [-(4*sqrt(2)); 4*sqrt(2)]
NS1 := min(NS[0, :]) = -5.65685
NS2 := min(NS[1, :]) = 5.65685
AG := integral(f(x), x = NS1 .. NS2)*2 → 30.1698893306
P := AZ/AG → 0.416520275452
# 2)
P := (AG - AZ)*6.89 + 3440 → 3561.28824396
# 3)
# Es sollte sich nicht ändern, da es ja in alle Richtungen gestreckt wird
M := 1.1*1.1 → 1.21
AZ2 := M*π*r^2 float → 15.2053084434
AG2 := M*integral(f(x), x = NS1 .. NS2)*2 → 36.5055660901
P := AZ/AG → 0.416520275452  # Keine Änderung!
# 7.39)
clear(f, M, NS, NS1, NS2)
f(x) := (x - 2)^2
integral(f(x), x) simplify → x^3/3 + (4*x - 2*x^2)
NS := f(x) == 0 solve → [2; 2]
NS1 := min(NS[0, :]) → 2
NS2 := min(NS[1, :]) → 2
# [plot: f(x) vs x]
# a)
A := integral(f(x), x = 0 .. NS1) float → 2.66666666667
M := |integral(f(x), x = 0 .. M)| == A/2 solve, M, assume, M > 0 → 0.412598948032
# b)
clear(M)
f2(y) := f(x) == y solve, x → [sqrt(y) + 2; -sqrt(y) + 2]
f21(y) := min(f2(y)[0, :]) → sqrt(y) + 2
f22(y) := min(f2(y)[1, :]) → -sqrt(y) + 2
f21(0) == 2 → 1
f21(4) == 0 → 0  # Only -sqrt(y) + 2 properly represents the function we want
f22(0) == 2 → 1
f22(4) == 0 → 1
# [plot: f22(y) vs y]
M := |integral(f22(y), y = 0 .. M)| == A/2 solve, M, assume, M > 0 → 1.0
# 7.52)
# a)
f(x) := sin(x) + 1
a := 0
b := π
V := π*integral(f(x)^2, x = a .. b) float → 27.370777216
# b)
f(x) := cos(x)
a := 0
b := π/2
V := π*integral(f(x)^2, x = a .. b) float → 2.46740110027
# c)
f(x) := 2*e^x
a := 0
b := 1
V := π*integral(f(x)^2, x = a .. b) float → 40.1436234075
# 7.53)
clear(f, f2, f21, f22, a, b, c, d)
# a)
f(x) := 2*x^2
c := 0
d := 8
f2(y) := f(x) == y solve, x → [sqrt(2*y)/2; -sqrt(2*y)/2]
f21(y) := min(f2(y)[0, :]) → sqrt(2)*sqrt(y)/2
f22(y) := min(f2(y)[1, :]) → -(sqrt(2)*sqrt(y))/2
f(0) → 0
f21(0) == 0 → 1
f22(0) == 0 → 1
# Only sqrt(2)*sqrt(y)/2 properly represents the function we want
f(3) → 18
f21(18) == 3 → 1
f22(18) == 3 → 0
f(10) → 200
f21(200) == 10 → 1
f22(200) == 10 → 0
V := π*integral(f21(y)^2, y = c .. d) float → 50.2654824574
# Actually both functions return the correct volume, but the second one should still rather not be used, as it doesn't map properly to the f(x) base function
V := π*integral(f22(y)^2, y = c .. d) float → 50.2654824574
# b)
f(x) := ln(x)
c := -1
d := 1
f2(y) := f(x) == y solve, x → e^y
V := π*integral(f2(y)^2, y = c .. d) float → 11.3941180129
# 7.75)
clear(f, a, b)
# c)
f(x) := x^3
a := -1
b := 3
s := integral(sqrt(1 + (f'(x))^2), x = a .. b) float → 29.2059475841
# 7.78)
f(x) := |sin(π/2*x)|
a := 0
b := 8
w := 2
it := b/w → 4
s := 4*integral(sqrt(1 + (f'(x))^2), x = a .. a + w) float → 11.7095637793
# 7.79)
clear(a, d, e, f)
# 1)
f(x) := a*(x - d)^2 + e
w := 1280
h := 150
S := [0, 0]
[d, e] := S → [0, 0]
f(x) := a*(x - d)^2 + e → a*x^2
ls := -w/2
rs := w/2
a := [f(0) == 0; f(ls) == h; f(rs) == h] solve, a → 3/8192
f(x) := a*(x - d)^2 + e → 3*x^2/8192
# 2)
s := integral(sqrt(1 + (f'(x))^2), x = ls .. rs) float → 1325.43976799
# 3)
clear(f, a, d, e, ls, rs, w, h, S)
f(x) := a(x - d)^2 + e
w := 1991
h := 216.3
S := [0, 0]
[d, e] := S → [0, 0]
f(x) := a*(x - d)^2 + e → a*x^2
ls := -w/2 float → -995.5
rs := w/2 float → 995.5
a := [f(0) == 0; f(rs) == h; f(ls) == h] solve, a → 0.000218259919512
f(x) := a*(x - d)^2 + e → 0.000218259919512*x^2
s1 := integral(sqrt(1 + (f'(x))^2), x = ls .. 0) float → 1025.99885487
s2 := integral(sqrt(1 + (f'(x))^2), x = 0 .. rs) float → 1025.99885487
s := s1 + s2 float → 2051.99770974
# 7.92 b)
# 1)
f(x) := sin(x)
a := 0
b := π
m := integral(f(x), x = a .. b)/(b - a) → 2/π
# 2)
q := sqrt(integral(f(x)^2, x = a .. b)/(b - a)) → sqrt(2)/2
# 7.95)
clear(f, t, a, b, m)
f(t) := -0.1*t^2 + 2*t + 10  # t ... in Sekunden, f(t) ... Temperatur in °C
# 1)
# [plot: f(t) vs t]
# 2)
a := 7
b := 24
s := 7
m := integral(f(t), t = a - s .. b - s)/(b - a) → 17.3666666667
# 3)
# Der Mittelwert steigt um 3 °C
f(t) := f(t) + 5 → -0.1*t^2 + 2.0*t + 15.0
m := integral(f(t), t = a - s .. b - s)/(b - a) → 22.3666666667  # 22.36 - 5 = 17.36 (Richtig)
# 7.96)
clear(s, w, m, d, e)
# 1)
# Das Auto fährt rückwerts.
# 2)
w := 1/60*60/2 + 4/60*60 + 1/60*60/2 + |1/60*(-20/2)| + |1/60*(-20)| float → 5.5
s := w/(8/60) → 41.25
(1/60*60/2) + (4/60*60) + (1/60*60/2) → 5
# 3)
w → 5.5
e := w + 2*(1/60*(-20/2) + 1/60*(-20)) float → 4.5
# 7.103)
clear(A, t)
A(t) := 2000*t/(t^2 + 25)  # t ... Zeit in Tage, A(t) ... Anzahl der Antikörper
# [plot: A(t) vs t]
# 1)
# Am Anfang werden sehr schnell Antikörper gebildet, bis dann am 5 Tag langsam die Zahl der Antikörper runtergeht.
# 2)
a := 0
b := 10
A10 := integral(A(t), t = a .. b) float → 1609.43791243
a := 0
b := 28
A28 := integral(A(t), t = a .. b) float → 3476.92309219
# 7.104)
clear(a, f, t)
a(t) := -1.2*t^2 + 2.4*t  # t ... Zeit in Sekunden, a(t) ... Beschleunigung im Moment t
# 1)
# [plot: a(t) vs t]
# Die Fläche beschreibt die Geschwindigkeit des Wagens (Muss jedoch mit den restlichen Bereich addiert werden, um die komplette Geschwindigkeit zu erhalten, z.B. nach 2s muss im Bereich [0, 2] gerechnet werden).
# 2)
clear(t)
a(t) == 0 solve, t, assume, t > 0 → 2.0
v(t) := integral(a(t), t) → -0.4*t^2*(t - 3.0)
v(2) → 1.6
# 3)
NS := v(t) == 0 solve, t, assume, t > 0 → 3.0
s := integral(v(t), t = 0 .. NS) float → 2.7
# 7.105)
clear(v, t, NS, NS1, NS2)
# 1)
# Der Zug fährt rückwerts.
# 2)
v(t) := -0.0029*t^4 + 0.306*t^3 - 10.28*t^2 + 109.1*t  # t ... in Minuten, v(t) ... Geschwindigkeit im Moment t
NS := v(t) == 0 solve, t, float → [0.0; 47.9652884224; 22.1634687142; 35.3884842427]
NS1 := min(NS[0, :]) → 0.0
NS[0, :] → [0.0]
NS2 := min(NS[2, :]) → 22.1634687142
NS3 := min(NS[3, :]) → 35.3884842427
NS4 := min(NS[1, :]) → 47.9652884224
# GS ist der Weg, der alle Fahrstrecken (auch negative) einberechnet und summiert
GS := |integral(v(t), t = NS1 .. NS2)| + |integral(v(t), t = NS2 .. NS3)| + |integral(v(t), t = NS3 .. NS4)| float → 6243.957262
# DS ist die Distanz, die vom Urpsprung her aus geht und negative Fahrstrecken abzieht
DS := |integral(v(t), t = NS1 .. NS2)| - |integral(v(t), t = NS2 .. NS3)| + |integral(v(t), t = NS3 .. NS4)| float → 5028.82984109
# 7.106
clear(v, t, d, e, f, P, M)
v(t) := 15*t*e^(-1.8*t)  # t ... in Sekunden, v(t) ... in Liter/Sekunde
# 1)
integral(v(t), t = t1 .. t2)
# A: Würde das Gesamtvolumen (Liter) ausrechnen.
# 2)
P := v'(t) == 0 solve, t → 0.555555555556
v''(P) → -9.93274491163  # Da v''(P)<0 ist es unser Höhepunkt
M := integral(v(t), t = 0 .. P) → 1.22333850767  # Insgesamt sind bis dahin 1.22 Liter Wasser geflossen.
# 3)
M := 3
clear(t, P)
V(t) := integral(v(t), t) → (-8.33333333333*t - 4.62962962963)*e^(-1.8*t)
P := M == |integral(v(t), t = 0 .. P)| solve, P → 1.22809653816
# [plot: v(t) vs t]
V(0) → -4.62962962963
V(1) → -2.14276336584
V(2) → -0.581894089155
V(3) → -0.133824620522
V(4) → -0.0283426093921
