# Übungsbeispiele: 4.14 c) 4.32) 4.33 c) 4.37) 5.61)
# 4.14 a)
y'' == -2*sin(3*x)
u := 3*x  # error: This variable is undefined. Check that the label is set correctly.
y'' == -2*sin(u)
du/dx == 3
y' == -2*integral(sin(u)*1/3, u)
dx == du/3
y' == -2/3*integral(sin(u), u)
y' == 2/3*cos(3*x) + C_1
y == 2/3*integral(cos(u)*1/3, u) + integral(C_1, x)
y == 2/9*sin(3*x) + C_1*x/2 + C_2 == 2/9*sin(3*x) + x*C_1 + C_2
# 4.32)
# a)
0 == e^x*y' + y
y' == -y/e^x
dy/dx == -y/e^x
dy/(-y) == 1/e^x*dx
(-y)^-1*dy == e^(-x)*dx
-ln(|-y|) == e^(-x) + C
y == e^(e^(-x)) + C
# b)
y'*cos(x) + y*sin(x) == 0
y'*cos(x) == -y*sin(x)
y' == -y*sin(x)/cos(x)
dy/dx == -y*sin(x)/cos(x)
y^-1*dy == -sin(x)/cos(x)*dx
ln(|y|) == -tan(x)*dx
ln(|y|) == ln(|cos(x)|) + C
y == cos(x) + C
# c)
y'*(1 - x^2) + x*y == 0
y' == -x*y/(1 - x^2)
dy/dx == -x*y/(1 - x^2)
dy/y == -x/(1 - x^2)*dx
u := x^2  # error: This variable is undefined. Check that the label is set correctly.
du/dx == 2*x
y^-1*dy == -integral(x/(1 - u)*1/(2*x), u)
dx == du/(2*x)
y^-1*dy == -1/2*integral(1/(1 - u), u)
ln(|y|) == -1/2*(-ln(|1 - u|)) + C
ln(|y|) == 1/2*ln(|1 - u|) + C
y == e^(1/2*ln(|1 - u|)) + C
# 3.37)
# 1)
y' == k(8000 - y(t))  # t ... Zeit in Wochen
# 2)
y(0) == 300
y(7) == 345
dy/(8000 - y) == k*dt
(8000 - y)^-1*dy == k*dt
u == 8000 - y
-u^-1*du == k*dt
du/dx == -1
-ln(|8000 - y|) == k*t + C
dx == -du
ln(|8000 - y|) == -k*t + C
8000 - y == e^(-k*t + C)
8000 - y == e^(-k*t)*C
y == -e^(-k*t)*C + 8000
y(0) == -1*C + 8000
300 == -1*C + 8000
C == 7700
y(1) == -e^(-k)*7700 + 8000
345 == -7700*e^(-k)
7655 == 7700*e^(-k)
7655/7700 float → 0.994155844156
0.9942 == e^(-k)
-k == ln(0.9942)
k == -ln(0.9442)
k == 0.00586
8000*0.9 == -e^(-0.00586*t)*7700 + 8000
7200 == -e^(-0.00586*t)*7700 + 8000
-800 == -e^(-0.00586*t)*7700
-8/77 == -e^(-0.00586*t)
-0.00586*t == ln(8/77)
t == ln(8/77)/(-0.00586) → t == 386.41021846
# 5.61)
A := [1, -2; 7, 6]
B := [1, 0, 2; 3, 2, 1]
C := [3, 1, 5]
D := [1, 0; 0, -1]
# a)
2*B == [2*1, 0, 2*2; 2*3, 2*2, 2*1] → 1
# b)
A + D == [1 + 1, -2 + 0; 7 + 0, 6 - 1] → 1
# c)
det(B) == GEHTNICHT
B^-1 == 1/det(B)*[d, -b; -c, a]
# d)
B*C == GEHTNICHT
# Test Matrixmultiplikation:
# e)
B*D == GEHTNICHT
[1, 2, 2; 3, 4, 1]*[1, 2; 3, 4; 1, 1]
# f)
D*B → [1, 0, 2; -3, -2, -1]
[1*1 + 2*3 + 2*1, 1*2 + 2*4 + 2*1; 3*1 + 4*3 + 1*1, 3*2 + 4*4 + 1*1]
[1, 0; 0, -1]*[1, 0, 2; 3, 2, 1] == [1*1 + 0*2, 1*0 + 0*2, 1*2 + 0*1; 0*1 + (-1*3), 0*0 + (-1*2), 0*2 + (-1*1)] → 1
# g)
A^-1 == 1/det(A)*[d, -b; -c, a] == 1/det(A)*[6, 2; -7, 1]
det(A) == 1*6 - (-2)*7 == 20 → 1
A^-1 == 1/20*[6, 2; -7, 1] == [1/20*6, 1/20*2; 1/20*(-7), 1/20*1] → 1
# h)
B == [1, 0, 2; 3, 2, 1]
B_T == [1, 3; 0, 2; 2, 1]
