# 4. SA Übungsaufgaben
# 7.59)
P(17, 2.5)  # Wir nehmen x und y aus P für die Scheitelpunktformel
S_1(4, 6)
y := a*(x - x_s)^2 + y_s  # error: This variable is undefined. Check that the label is set correctly.
2.5 == a*(x - 4)^2 + 6
a := 2.5 == a*(17 - 4)^2 + 6 solve, a → -0.0207100591716
f(x) := a*(x - 4)^2 + 6 → -0.0207100591716*(x - 4.0)^2 + 6.0
S_2(20, 4)
y := a*(x - x_s)^2 + y_s  # error: This variable is undefined. Check that the label is set correctly.
2.5 == b*(17 - 20)^2 + 4
b := 2.5 == b*(17 - 20)^2 + 4 solve, b → -0.166666666667
f_2(x) := b*(x - 20)^2 + 4 → -0.166666666667*(x - 20.0)^2 + 4.0
π*(integral(6^2, x = 0 .. 4) + integral(f(x)^2, x = 4 .. 17) + integral(f_2(x)^2, x = 17 .. 24))*0.7 → 1188.49940744
# Allgemeine Formel für eine Parabel:
y == a*x² + b*x + c
# 7.10 d)
f(x) := x^3 - 2*x^2 - 3*x
a := -1
b := 4
NS := f(x) == 0 solve, x → [0; 3; -1]
NS1 := min(NS[0, :])
NS2 := min(NS[1, :])
A := |integral(f(x), x = a .. NS1)| + |integral(f(x), x = NS1 .. NS2)| + |integral(f(x), x = NS2 .. b)| float → 20.4166666667
# 7.17 a)
f_1(x) := x^2
f_2(x) := sqrt(x)
[a; b] := f_1(x) == f_2(x) solve, x → [1; 0]
# [plot: f_1(x), f_2(x) vs x]
A := |integral(f_1(x), x = a .. b) - integral(f_2(x), x = a .. b)| → 1/3
# Bsp)
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g(x) := 27.5*sin(π/89*x)  # 0 <= x <= 979mm
# [plot: g(x) vs x]
b := 979
d := 1
l := 1200
S := integral(sqrt(1 + (g'(x))^2), x = 0 .. b) = 1179.63
A := S*l*d → 1415559.97024  # mm³
M := A/1000*7.85 → 11112.1457664  # g
# Bsp)
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g(x) := -2*x^3 + 3*x^2
K(r) := r^2*π
r := 0.5
# [plot: g(x) vs x, 1]
A := 2*integral(g(x), x = 0 .. 1) + K(r) → 1.7853981634
# Bsp)
clear(a, b, M, f)
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a := 0
b := 30
M := 1/(b - a)*integral(f(t), t = a .. b) → integral(f(t), t = 0 .. 30)/30
# Bsp)
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f(x) := -0.1*x^2 + 0.9*x + 1  # x>=0
a := 0
b := f(x) == 0 solve, x, assume, x ≥ 0 → 10.0
S := integral(sqrt(1 + (f'(x))^2), x = a .. b) → 11.5132689798
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g(x) := -0.00108*x^3 + 0.046*x^2 - 0.4367*x + 3  # 2 <= x <= 25
R := g'(x) == 0 solve, x → [6.0252648368; 22.3697968916]
y_min := 2*g(min(R)) → 3.60500616254
V := π*integral(g(x)^2, x = 2 .. 25) → 678.644919022
# 7.83)
15! → 1307674368000
# 7.84)
# a)
n := 11
n! → 39916800
# b)
n := 11
k := 11
n^k → 285311670611
# 7.85)
# a)
8!/(2!*2!*3!) → 1680
# b)
7!/(2!*2!*3!) → 210
# 7.90)
# 1)
n := 9
k := 5
n^k → 59049
# 2)
n!/(n - k)! → 15120
# 7.92)
# 1)
n := 12
k := 5
n!/(n - k)! → 95040
# Bsp) RSA
p := 17
q := 19
n := p*q → 323
ϕ := (p - 1)*(q - 1) → 288
e := 59
gcd(e, ϕ) → 1
d :=
    for d ∈ 2, 3 .. ϕ
        if mod(e*d, ϕ) == 1
            return d
    → 83
m := 100
c :=
    c1 ← 1
    for i ∈ 1, 2 .. e
        c1 ← mod(c1*m, n)
    return c1
    → 9
m :=
    m1 ← 1
    for i ∈ 1, 2 .. d
        m1 ← mod(m1*c, n)
    return m1
    → 100
# Bsp) Diffie-Hellmann
# Alice | Bob
a := 17
b := 20
g := 2
p := 19
A := mod(g^a, p) → 10
B := mod(g^b, p) → 4
A → 10
B → 4
S1 := mod(B^a, p) → 5
S1 := mod(A^b, p) → 5
