# 3. Mathe SA Prep 30.3.2025
# Integrale
# B602)
# a)
# 1)
A := integral(w(x), x = 1 .. 8) + integral(f(x), x = 8 .. 16) - integral(p(x), x = 4 .. 12)
# 2)
f(x) := k*x + d
[k, d] := [f(16) == 8; f(8) == 6] solve, k, d → [1/4, 4]
f(x) := k*x + d → x/4 + 4
w(x) := 3*nthroot(x, 3)
w'(8) == f'(8) → 1
# 3)
l := integral(sqrt(1 + (w'(x))^2), x = 1 .. 8) + integral(sqrt(1 + (f'(x))^2), x = 8 .. 16) = 15.9384
# B577)
# d)
# 1)
f(x) := -0.02*x^2 + 0.31*x + 2.44
EX := f'(x) == 0 solve, x → 7.75
f''(EX) → -0.04
d := 2*f(EX) → 7.2825
# 2)
clear(a, b)
V_f := π*integral(g(x)^2, x = a .. b)
# B554)
# b)
# 1)
# Die Reset :)
# 2)
s_x := 35
s_y := 30
f(x) := -6/245*(x - s_x)^2 + s_y
# c)
# 1)
q(x) := 7/2*sin(π/7*x)
# B523)
# a)
# 4)
g(x) := 13/17*x
200000 == π*integral(g(x)^2, x = 0 .. h) solve, h, float, assume, h == real → 68.8658911747
# B587)
# c)
# 1)
# Linie zwischen Start und Endpunkt ziehen, verschieben auf den Graphen v und dann den Schnittpunkt t2 damit einzeichnen
# B564)
clear(g, f, x, a)
# a)
# 1)
g(x) := f(x - 2)
# 2)
s_x := 0
s_y := 3
f(x) := a*(x - s_x)^2 + s_y → a*x^2 + 3
a := [f(1) == 0] solve, a → -3
f(x) := a*(x - s_x)^2 + s_y → -(3*x^2) + 3
# 3)
atan(f'(-1))/π*180 = 80.5377
atan(f'(-1)) = 80.5377°
# B561)
clear(f, g, a, b, c)
# c)
# 1)
A := integral(f(x) - g(x), x = -150 .. 15)
# 2)
f(x) := a*x^4 + b*x^3 + c*x^2
[a, b, c] := [f(-92.2) == -17.6; f'(-92.2) == 0; f(-133.5) == 0] solve, a, b, c, float → [0.126383690918*10^-6, -2.16055552618e-5, -0.00513678336292]
f(x) := a*x^4 + b*x^3 + c*x^2 → 0.126383690918*10^-6*x^4 - 2.16055552618e-5*x^3 - 0.00513678336292*x^2
# B640)
# d)
# 1. Ableitung: C, 2. Ableitung: D
# B635)
# b)
# 1)
# Länge der Schanze zwischen A und C
# 2)
f(x) := 102.5 - sqrt(100^2 - (x - 12.3)^2)
# 3)
α := 10.75°
sin(α)*6.5 = 1.21241
# B611)
# a)
# 1)
0.2 + 0.6 + 1.2 + 1.6 + 1.9 → 5.5
# 2)
# 14 Jahre
# B622)
# a)
# 1)
v_2 := [2; -1]
# 2)
# Wir landen bei Punkt (8, 2)
# 3)
s := 1 + sqrt(2^2 + (-1)^2) + sqrt(5^2 + (-1)^2) = 8.33509
v_1 := [1; 1]
v_3 := [5; -1]
α := acos(v_2*v_3/(|v_2|*|v_3|)) = 15.2551°
# B588)
# a)
# 1)
# Pfeil von P nach Q einzeichnen.
# 2)
α := acos(b*c/(|b|*|c|)) + 180
# 3)
a := [10; 47]
b := [25; -10]
c := [13; 3]
PQ := a + b + c → [48; 40]
|PQ| = 62.482
# 8.134)
# a)
A := [1; 13; 7]
B := [5; 6; 4]
C := [15; 3; -4]
E := [12; 9; 8]
AB := B - A → [4; -7; -3]
BC := C - B → [10; -3; -8]
EA := A - E → [-11; 4; -1]
V := |(AB×BC)*EA| → 567
# 8.135)
A := [-2; 3; 1]
B := [2; -1; 3]
C := [6; -3; 1]
h := 12
# 1)
AB := A - B = [-4; 4; -2]
BC := C - B = [4; -2; -2]
CA := A - C = [-8; 6; 0]
|AB| == |BC| == |CA| → 0
# 8.125)
# a)
-3*x + y + 2*z == 2
P := [1; -4; 8]
NV := [-3; 1; 2]
t := -3*(1 - 3*t) + (-4 + t) + 2*(8 + 2*t) == 2 solve, t → -1/2
S := P + t*NV = [2.5; -4.5; 7]
P' := P + 2*t*NV → [4; -5; 6]
# b)
clear(t)
-4*x - 7*y + 2*z == -12
P := [-7; 12; 7]
NV := [-4; -7; 2]
t := -4*(-7 - 4*t) - 7*(12 - 7*t) + 2*(7 + 2*t) == -12 solve, t → 10/23
S := P + t*NV = [-8.73913; 8.95652; 7.86957]
P' := P + 2*t*NV = [-10.4783; 5.91304; 8.73913]
# d)
clear(t)
3*x + 8*y == 29
P := [0; 31; 4]
NV := [3; 8; 0]
t := 3*(0 + 3*t) + 8*(31 + 8*t) + 0*(4 + 0*t) == 29 solve, t, float → -3.0
S := P + t*NV = [-9; 7; 4]
P' := P + 2*t*NV = [-18; -17; 4]
# 8.126)
# 2)
φ := acos(NV_1*NV_2/(|NV_1|*|NV_2|))
# 8.127)
clear(s, t)
# 1)
G(s) := [-1; 5; -10] + s*[2; -3; 6]
H(t) := [3; 5; 5] + t*[0; 2; 1]
G(s) == [3; -1; 2] solve, s → 2
H(t) == [3; -1; 2] solve, t → -3
# 2)
GA := [2; -3; 6]
HA := [0; 2; 1]
A := [3; -1; 2]
R := GA×HA → [-15; -2; 4]
R*A → -35
clear(s, t)
-15*x - 2*y + 4*z == -35
ε(s, t) := A + s*GA + t*HA
# 3)
ε(s, t) == [5; -4; 8] solve, s, t → [1, 0]
ε(s, t) == [3; 1; 3] solve, s, t → [0, 1]
B := ε(1, 0) → [5; -4; 8]
C := ε(0, 1) → [3; 1; 3]
# 4)
AB := B - A → [2; -3; 6]
AC := C - A → [0; 2; 1]
AB*AC → 0  # Stehen normal aufeinander :D
# 5)
BC := C - B → [-2; 5; -5]
D := A + BC → [1; 4; -3]
AD := D - A → [-2; 5; -5]
M := A + 1/2*AC = [3; 0; 2.5]
NV := AB×AD → [-15; -2; 4]
NV := NV/|NV| = [-0.958315; -0.127775; 0.255551]
S_1 := M + 7*sqrt(5)*NV = [-12; -2; 6.5]
S_2 := M + 7*sqrt(5)*(-NV) = [18; 2; -1.5]
# B537)
clear(k)
# a)
# 1)
B := [12; 6; 2]
C := [2; 26; 2]
D := [-10; 20; 0]
E := [-1.5; 5.5; 15.5]
F := [4.5; 8.5; 16.5]
G := [-0.5; 18.5; 16.5]
BC := C - B → [-10; 20; 0]
FG := G - F → [-5.0; 10.0; 0.0]
BC*k == FG solve, k → 0.5
# 2)
FE := E - F → [-6.0; -3.0; -1.0]
FG := G - F → [-5.0; 10.0; 0.0]
FE*FG → 0.0  # Ja ist rechtwinklig :D
# 3)
BF := F - B → [-7.5; 2.5; 14.5]
BD := D - B → [-22; 14; -2]
ω := acos(BF*BD/(|BF|*|BD|)) = 66.6779°
# B508)
# b)
# 1)
x := |v_M|*cos(α)
y := |v_M|*sin(α)
# 2)
# Der Tangenz eines Steigungswinkels α gibt die Steigung im Moment an, bzw. in diesem Fall b
clear(h, a, b, c, x)
h(x) := a*x^2 + b*x + c
h'(x) → 2*a*x + b
h'(0) == b
tan(α) == h'(0) == b =  # error: This variable is undefined. Check that the label is set correctly.
# B497)
# c)
# 1)
AB := [-4; 0]
AC := [-4; 2]
α := acos(AB*AC/(|AB|*|AC|)) = 26.5651°
# 3)
FG_L := 900
FH_L := FG_L*sin(α) = 402.492
